<?xml version="1.0"?>
<?xml-stylesheet type="text/xsl" href="http://jsbsim.sourceforge.net/JSBSim.xsl"?>
<fdm_config name="A300B2-103" version="2.0" release="ALPHA"
xmlns:xsi="http://www.w3.org/2001/XMLSchema-instance"
xsi:noNamespaceSchemaLocation="http://jsbsim.sourceforge.net/JSBSim.xsd">

<fileheader>
    <author> Aeromatic v 0.9 </author>
    <filecreationdate> now </filecreationdate>
    <version> 0.0 </version>
    <description> Models a A300B2-103. </description>
</fileheader>

<!--
File:     A300B2-103.xml
Inputs:
name:          A300B2-103
type:          two-engine transonic transport
max weight:    302085 lb
wing span:     147.10839245 ft
length:        175.9200018 ft
wing area:     2798.9 sq-ft
gear type:     tricycle
retractable?:  yes
# engines:     2
engine type:   turbine
engine layout: wings
yaw damper?    yes
Outputs:
wing loading:  107.93 lb/sq-ft
CL-alpha:      4.4 per radian
CL-0:          0.2
CL-max:        1.2
CD-0:          0.02
K:             0.043

    -->

<metrics>
    <wingarea  unit="FT2"> 2798.90 </wingarea>
    <wingspan  unit="FT" >  147.11 </wingspan>
    <wing_incidence>          1.833 </wing_incidence>
    <chord     unit="FT" >   21.686 </chord>
    <htailarea unit="FT2">  747.554 </htailarea>
    <htailarm  unit="FT" >   81.693 </htailarm>
    <vtailarea unit="FT2">  486.529 </vtailarea>
    <vtailarm  unit="FT" >   83.989 </vtailarm>
    <location name="AERORP" unit="IN">
    <x> 888.110 </x>
    <y>   0.00 </y>
    <z>  -5.926 </z>
    </location>
    <location name="EYEPOINT" unit="IN">
    <x> 147.77 </x>
    <y> -30.00 </y>
    <z>  70.00 </z>
    </location>
    <location name="VRP" unit="IN">
    <x> 888.110 </x>
    <y>   0     </y>
    <z>  -5.926 </z>
    </location>
</metrics>

<mass_balance>
    <ixx unit="SLUG*FT2">   1903354 </ixx>
    <iyy unit="SLUG*FT2">   5922457 </iyy>
    <izz unit="SLUG*FT2">   7519801 </izz>
    <ixy unit="SLUG*FT2">         0 </ixy>
    <ixz unit="SLUG*FT2">         0 </ixz>
    <iyz unit="SLUG*FT2">         0 </iyz>
    <emptywt unit="LBS" >    189396 </emptywt>
    <location name="CG" unit="IN">
    <x> 888.110 </x>
    <y>   0.00  </y>
    <z> -29.746 </z>
    </location>
</mass_balance>

<ground_reactions>
    <contact type="BOGEY" name="NOSE">
        <location unit="IN">
            <x> 262.736 </x>
            <y>   0.00 </y>
            <z> -189.37 </z>
        </location>
        <static_friction>  0.80 </static_friction>
        <dynamic_friction> 0.50 </dynamic_friction>
        <rolling_friction> 0.02 </rolling_friction>
        <spring_coeff unit="LBS/FT">      90625.50 </spring_coeff>
        <damping_coeff unit="LBS/FT/SEC"> 30208.50 </damping_coeff>
        <max_steer unit="DEG"> 5.00 </max_steer>
        <brake_group>NONE</brake_group>
        <retractable>1</retractable>
    </contact>

    <contact type="BOGEY" name="LEFT_MAIN_FWD">
        <location unit="IN">
            <x> 967.673 </x>
            <y> -188.976 </y>
            <z> -189.37 </z>
        </location>
        <static_friction>  0.80 </static_friction>
        <dynamic_friction> 0.50 </dynamic_friction>
        <rolling_friction> 0.02 </rolling_friction>
        <spring_coeff unit="LBS/FT">      151042.50 </spring_coeff>
        <damping_coeff unit="LBS/FT/SEC"> 30208.50 </damping_coeff>
        <max_steer unit="DEG">0</max_steer>
        <brake_group>LEFT</brake_group>
        <retractable>1</retractable>
    </contact>

    <contact type="BOGEY" name="LEFT_MAIN_AFT">
        <location unit="IN">
            <x> 1022.673 </x>
            <y> -188.976 </y>
            <z> -189.37 </z>
        </location>
        <static_friction>  0.80 </static_friction>
        <dynamic_friction> 0.50 </dynamic_friction>
        <rolling_friction> 0.02 </rolling_friction>
        <spring_coeff unit="LBS/FT">      151042.50 </spring_coeff>
        <damping_coeff unit="LBS/FT/SEC"> 30208.50 </damping_coeff>
        <max_steer unit="DEG">0</max_steer>
        <brake_group>LEFT</brake_group>
        <retractable>1</retractable>
    </contact>

    <contact type="BOGEY" name="RIGHT_MAIN_FWD">
        <location unit="IN">
            <x>  967.673 </x>
            <y>  188.976 </y>
            <z> -189.37 </z>
        </location>
        <static_friction>  0.80 </static_friction>
        <dynamic_friction> 0.50 </dynamic_friction>
        <rolling_friction> 0.02 </rolling_friction>
        <spring_coeff unit="LBS/FT">      151042.50 </spring_coeff>
        <damping_coeff unit="LBS/FT/SEC"> 30208.50 </damping_coeff>
        <max_steer unit="DEG">0</max_steer>
        <brake_group>RIGHT</brake_group>
        <retractable>1</retractable>
    </contact>

    <contact type="BOGEY" name="RIGHT_MAIN_AFT">
        <location unit="IN">
            <x> 1022.673 </x>
            <y>  188.976 </y>
            <z> -189.37 </z>
        </location>
        <static_friction>  0.80 </static_friction>
        <dynamic_friction> 0.50 </dynamic_friction>
        <rolling_friction> 0.02 </rolling_friction>
        <spring_coeff unit="LBS/FT">      151042.50 </spring_coeff>
        <damping_coeff unit="LBS/FT/SEC"> 30208.50 </damping_coeff>
        <max_steer unit="DEG">0</max_steer>
        <brake_group>RIGHT</brake_group>
        <retractable>1</retractable>
    </contact>

    <contact type="STRUCTURE" name="NOSE_1">
        <location unit="IN">
            <x>  50.4921 </x>
            <y>   0 </y>
            <z> -53.0266 </z>
        </location>
        <static_friction> 1.0 </static_friction>
        <dynamic_friction> 1.4 </dynamic_friction>
        <rolling_friction> 1.0 </rolling_friction>
        <spring_coeff unit="LBS/FT"> 1.5e+06 </spring_coeff>
        <damping_coeff unit="LBS/FT/SEC"> 50000 </damping_coeff>
        <max_steer unit="DEG"> 0.0 </max_steer>
        <brake_group> NONE </brake_group>
        <retractable>0</retractable>
    </contact>
    <contact type="STRUCTURE" name="NOSE_2">
        <location unit="IN">
            <x> 131.398 </x>
            <y>   0 </y>
            <z> -81.738 </z>
        </location>
        <static_friction> 1.0 </static_friction>
        <dynamic_friction> 1.4 </dynamic_friction>
        <rolling_friction> 1.0 </rolling_friction>
        <spring_coeff unit="LBS/FT"> 1.5e+06 </spring_coeff>
        <damping_coeff unit="LBS/FT/SEC"> 50000 </damping_coeff>
        <max_steer unit="DEG"> 0.0 </max_steer>
        <brake_group> NONE </brake_group>
        <retractable>0</retractable>
    </contact>
    <contact type="STRUCTURE" name="NOSE_3">
        <location unit="IN">
            <x>  276.319 </x>
            <y>    0 </y>
            <z> -106.122 </z>
        </location>
        <static_friction> 1.0 </static_friction>
        <dynamic_friction> 1.4 </dynamic_friction>
        <rolling_friction> 1.0 </rolling_friction>
        <spring_coeff unit="LBS/FT"> 1.5e+06 </spring_coeff>
        <damping_coeff unit="LBS/FT/SEC"> 50000 </damping_coeff>
        <max_steer unit="DEG"> 0.0 </max_steer>
        <brake_group> NONE </brake_group>
        <retractable>0</retractable>
    </contact>
    <contact type="STRUCTURE" name="CENTER_1">
        <location unit="IN">
            <x>  443.248 </x>
            <y>    0 </y>
            <z> -111.024 </z>
        </location>
        <static_friction> 1.0 </static_friction>
        <dynamic_friction> 1.4 </dynamic_friction>
        <rolling_friction> 1.0 </rolling_friction>
        <spring_coeff unit="LBS/FT"> 1.5e+06 </spring_coeff>
        <damping_coeff unit="LBS/FT/SEC"> 50000 </damping_coeff>
        <max_steer unit="DEG"> 0.0 </max_steer>
        <brake_group> NONE </brake_group>
        <retractable>0</retractable>
    </contact>
    <contact type="STRUCTURE" name="CENTER_2">
        <location unit="IN">
            <x> 1655.295 </x>
            <y>    0 </y>
            <z> -111.024 </z>
        </location>
        <static_friction> 1.0 </static_friction>
        <dynamic_friction> 1.4 </dynamic_friction>
        <rolling_friction> 1.0 </rolling_friction>
        <spring_coeff unit="LBS/FT"> 1.5e+06 </spring_coeff>
        <damping_coeff unit="LBS/FT/SEC"> 50000 </damping_coeff>
        <max_steer unit="DEG"> 0.0 </max_steer>
        <brake_group> NONE </brake_group>
        <retractable>0</retractable>
    </contact>
    <contact type="STRUCTURE" name="TAIL_1">
        <location unit="IN">
            <x> 1738.560 </x>
            <y>    0 </y>
            <z> -109.000 </z>
        </location>
        <static_friction> 1.0 </static_friction>
        <dynamic_friction> 1.4 </dynamic_friction>
        <rolling_friction> 1.0 </rolling_friction>
        <spring_coeff unit="LBS/FT"> 1.5e+06 </spring_coeff>
        <damping_coeff unit="LBS/FT/SEC"> 50000 </damping_coeff>
        <max_steer unit="DEG"> 0.0 </max_steer>
        <brake_group> NONE </brake_group>
        <retractable>0</retractable>
    </contact>
    <contact type="STRUCTURE" name="TAIL_2">
        <location unit="IN">
            <x> 1947.421 </x>
            <y>    0 </y>
            <z>  -81.221 </z>
        </location>
        <static_friction> 1.0 </static_friction>
        <dynamic_friction> 1.4 </dynamic_friction>
        <rolling_friction> 1.0 </rolling_friction>
        <spring_coeff unit="LBS/FT"> 1.5e+06 </spring_coeff>
        <damping_coeff unit="LBS/FT/SEC"> 50000 </damping_coeff>
        <max_steer unit="DEG"> 0.0 </max_steer>
        <brake_group> NONE </brake_group>
        <retractable>0</retractable>
    </contact>
    <contact type="STRUCTURE" name="TAIL_3">
        <location unit="IN">
            <x> 2135.217 </x>
            <y>    0 </y>
            <z>  -35.772 </z>
        </location>
        <static_friction> 1.0 </static_friction>
        <dynamic_friction> 1.4 </dynamic_friction>
        <rolling_friction> 1.0 </rolling_friction>
        <spring_coeff unit="LBS/FT"> 1.5e+06 </spring_coeff>
        <damping_coeff unit="LBS/FT/SEC"> 50000 </damping_coeff>
        <max_steer unit="DEG"> 0.0 </max_steer>
        <brake_group> NONE </brake_group>
        <retractable>0</retractable>
    </contact>
    <contact type="STRUCTURE" name="TAIL_4">
        <location unit="IN">
            <x> 2309.705 </x>
            <y>    0 </y>
            <z>   22.500 </z>
        </location>
        <static_friction> 1.0 </static_friction>
        <dynamic_friction> 1.4 </dynamic_friction>
        <rolling_friction> 1.0 </rolling_friction>
        <spring_coeff unit="LBS/FT"> 1.5e+06 </spring_coeff>
        <damping_coeff unit="LBS/FT/SEC"> 50000 </damping_coeff>
        <max_steer unit="DEG"> 0.0 </max_steer>
        <brake_group> NONE </brake_group>
        <retractable>0</retractable>
    </contact>
    <contact type="STRUCTURE" name="TAIL_5">
        <location unit="IN">
            <x> 2445.728 </x>
            <y>    0 </y>
            <z>   59.449 </z>
        </location>
        <static_friction> 1.0 </static_friction>
        <dynamic_friction> 1.4 </dynamic_friction>
        <rolling_friction> 1.0 </rolling_friction>
        <spring_coeff unit="LBS/FT"> 1.5e+06 </spring_coeff>
        <damping_coeff unit="LBS/FT/SEC"> 50000 </damping_coeff>
        <max_steer unit="DEG"> 0.0 </max_steer>
        <brake_group> NONE </brake_group>
        <retractable>0</retractable>
    </contact>
    <contact type="STRUCTURE" name="WING_TIP_1">
        <location unit="IN">
            <x> 1238.686 </x>
            <y> -882.607 </y>
            <z>   29.320 </z>
        </location>
        <static_friction> 1.0 </static_friction>
        <dynamic_friction> 1.4 </dynamic_friction>
        <rolling_friction> 1.0 </rolling_friction>
        <spring_coeff unit="LBS/FT"> 1.5e+06 </spring_coeff>
        <damping_coeff unit="LBS/FT/SEC"> 50000 </damping_coeff>
        <max_steer unit="DEG"> 0.0 </max_steer>
        <brake_group> NONE </brake_group>
        <retractable>0</retractable>
    </contact>
    <contact type="STRUCTURE" name="WING_TIP_2">
        <location unit="IN">
            <x> 1238.686 </x>
            <y>  882.607 </y>
            <z>   29.320 </z>
        </location>
        <static_friction> 1.0 </static_friction>
        <dynamic_friction> 1.4 </dynamic_friction>
        <rolling_friction> 1.0 </rolling_friction>
        <spring_coeff unit="LBS/FT"> 1.5e+06 </spring_coeff>
        <damping_coeff unit="LBS/FT/SEC"> 50000 </damping_coeff>
        <max_steer unit="DEG"> 0.0 </max_steer>
        <brake_group> NONE </brake_group>
        <retractable>0</retractable>
    </contact>
</ground_reactions>

<propulsion>

    <engine file="cf6_50">
    <location unit="IN">
        <x>  777.165 </x>
        <y> -312.595 </y>
        <z>  -69.803 </z>
    </location>
    <orient unit="DEG">
    <pitch> 0.50 </pitch>
    <roll>   0.00 </roll>
    <yaw>   0.00 </yaw>
    </orient>
    <feed>0</feed>
    <feed>1</feed>
    <feed>3</feed>
    <feed>4</feed>
    <thruster file="direct">
    <location unit="IN">
        <x>  777.165 </x>
        <y> -312.595 </y>
        <z>  -69.803 </z>
    </location>
    <orient unit="DEG">
    <pitch> 0.50 </pitch>
    <roll>   0.00 </roll>
    <yaw>   0.00 </yaw>
    </orient>
    </thruster>
    </engine>

    <engine file="cf6_50">
    <location unit="IN">
        <x>  777.165 </x>
        <y>  312.595 </y>
        <z>  -69.803 </z>
    </location>
    <orient unit="DEG">
    <pitch> 0.50 </pitch>
    <roll>   0.00 </roll>
    <yaw>   0.00 </yaw>
    </orient>
    <feed>0</feed>
    <feed>1</feed>
    <feed>3</feed>
    <feed>4</feed>
    <thruster file="direct">
    <location unit="IN">
        <x>  777.165 </x>
        <y>  312.595 </y>
        <z>  -69.803 </z>
    </location>
    <orient unit="DEG">
    <pitch> 0.50 </pitch>
    <roll>   0.00 </roll>
    <yaw>   0.00 </yaw>
    </orient>
    </thruster>
    </engine>

    <tank type="FUEL" number="0">    <!-- Left inner tank. -->
        <location unit="IN">
            <x>  898.645 </x>
            <y> -307.284 </y>
            <z>  -24.292 </z>
        </location>
        <capacity unit="LBS"> 29506.5 </capacity>
        <contents unit="LBS"> 1475.325 </contents>
    </tank>

    <tank type="FUEL" number="1">    <!-- Left outer tank. -->
        <location unit="IN">
            <x> 1061.353 </x>
            <y> -646.016 </y>
            <z>   14.748 </z>
        </location>
        <capacity unit="LBS"> 8412.5 </capacity>
        <contents unit="LBS"> 420.625 </contents>
    </tank>

    <tank type="FUEL" number="2">    <!-- Left surge tank. -->
        <location unit="IN">
            <x> 1155.529 </x>
            <y> -831.046 </y>
            <z>   30.204 </z>
        </location>
        <capacity unit="LBS"> 276.32 </capacity>    <!-- Is this a correct value? -->
        <contents unit="LBS">   0.0  </contents>
    </tank>

    <tank type="FUEL" number="3">    <!-- Right inner tank. -->
        <location unit="IN">
            <x>  898.645 </x>
            <y>  307.284 </y>
            <z>  -24.292 </z>
        </location>
        <capacity unit="LBS"> 29506.5 </capacity>
        <contents unit="LBS"> 1475.325 </contents>
    </tank>

    <tank type="FUEL" number="4">    <!-- Right outer tank. -->
        <location unit="IN">
            <x> 1061.353 </x>
            <y>  646.016 </y>
            <z>   14.748 </z>
        </location>
        <capacity unit="LBS"> 8412.5 </capacity>
        <contents unit="LBS"> 420.625 </contents>
    </tank>

    <tank type="FUEL" number="5">    <!-- Right surge tank. -->
        <location unit="IN">
            <x> 1155.529 </x>
            <y>  831.046 </y>
            <z>   30.204 </z>
        </location>
        <capacity unit="LBS"> 276.32 </capacity>    <!-- Is this a correct value? -->
        <contents unit="LBS">   0.0 </contents>
    </tank>

</propulsion>

<flight_control name="FCS: A300B2-103">

    <channel name="Pitch">
        <summer name="Pitch Trim Sum">
            <input>fcs/elevator-cmd-norm</input>
            <input>fcs/pitch-trim-cmd-norm</input>
            <clipto>
                <min> -1 </min>
                <max>  1 </max>
            </clipto>
        </summer>

        <aerosurface_scale name="Elevator Control">
            <input>fcs/pitch-trim-sum</input>
            <range>
                <min> -0.35 </min>
                <max>  0.30 </max>
            </range>
            <output>fcs/elevator-pos-rad</output>
        </aerosurface_scale>

    </channel>

    <channel name="Roll">
        <summer name="Roll Trim Sum">
            <input>fcs/aileron-cmd-norm</input>
            <input>fcs/roll-trim-cmd-norm</input>
            <clipto>
                <min> -1 </min>
                <max>  1 </max>
            </clipto>
        </summer>

        <aerosurface_scale name="Left Aileron Control">
            <input>fcs/roll-trim-sum</input>
            <range>
                <min> -0.35 </min>
                <max>  0.35 </max>
            </range>
            <output>fcs/left-aileron-pos-rad</output>
        </aerosurface_scale>

        <aerosurface_scale name="Right Aileron Control">
            <input>fcs/roll-trim-sum</input>
            <range>
                <min> -0.35 </min>
                <max>  0.35 </max>
            </range>
            <output>fcs/right-aileron-pos-rad</output>
        </aerosurface_scale>

    </channel>

    <channel name="Yaw">
        <summer name="Rudder Command Sum">
            <input>fcs/rudder-cmd-norm</input>
            <input>fcs/yaw-trim-cmd-norm</input>
            <limit>
                <min> -0.35 </min>
                <max>  0.35 </max>
            </limit>
        </summer>

        <aerosurface_scale name="Rudder Control">
            <input>fcs/rudder-command-sum</input>
            <range>
                <min> -0.35 </min>
                <max>  0.35 </max>
            </range>
            <output>fcs/rudder-pos-rad</output>
        </aerosurface_scale>

    </channel>

    <channel name="Flaps">
        <kinematic name="Flaps Control">
            <input>fcs/flap-cmd-norm</input>
            <traverse>
                <setting>
                    <position>  0 </position>
                    <time>      0 </time>
                </setting>
                <setting>
                    <position> 15 </position>
                    <time>      4 </time>
                </setting>
                <setting>
                    <position> 30 </position>
                    <time>      3 </time>
                </setting>
            </traverse>
            <output>fcs/flap-pos-deg</output>
        </kinematic>

    </channel>

    <channel name="Landing Gear">
        <kinematic name="Gear Control">
            <input>gear/gear-cmd-norm</input>
            <traverse>
                <setting>
                    <position> 0 </position>
                    <time>     0 </time>
                </setting>
                <setting>
                    <position> 1 </position>
                    <time>     5 </time>
                </setting>
            </traverse>
            <output>gear/gear-pos-norm</output>
        </kinematic>

    </channel>

    <channel name="Speedbrake">
        <kinematic name="Speedbrake Control">
            <input>fcs/speedbrake-cmd-norm</input>
            <traverse>
                <setting>
                    <position> 0 </position>
                    <time>     0 </time>
                </setting>
                <setting>
                    <position> 1 </position>
                    <time>     1 </time>
                </setting>
            </traverse>
            <output>fcs/speedbrake-pos-norm</output>
        </kinematic>

    </channel>

</flight_control>

<aerodynamics>

    <axis name="LIFT">

        <function name="aero/coefficient/CLalpha">
            <description>Lift_due_to_alpha</description>
            <product>
                <property>aero/qbar-psf</property>
                <property>metrics/Sw-sqft</property>
                <table>
                    <independentVar lookup="row">aero/alpha-rad</independentVar>
                    <tableData>
                        -0.20 -0.680
                        0.00 0.200
                        0.23    1.200
                        0.60 0.600
                    </tableData>
                </table>
            </product>
        </function>

        <function name="aero/coefficient/dCLflap">
            <description>Delta_Lift_due_to_flaps</description>
            <product>
                <property>aero/qbar-psf</property>
                <property>metrics/Sw-sqft</property>
                <property>fcs/flap-pos-deg</property>
                <value> 0.05000 </value>
            </product>
        </function>

        <function name="aero/coefficient/dCLsb">
            <description>Delta_Lift_due_to_speedbrake</description>
            <product>
                <property>aero/qbar-psf</property>
                <property>metrics/Sw-sqft</property>
                <property>fcs/speedbrake-pos-norm</property>
                <value>-0.1</value>
            </product>
        </function>

        <function name="aero/coefficient/CLde">
            <description>Lift_due_to_Elevator_Deflection</description>
            <product>
                <property>aero/qbar-psf</property>
                <property>metrics/Sw-sqft</property>
                <property>fcs/elevator-pos-rad</property>
                <value>0.2</value>
            </product>
        </function>

    </axis>

    <axis name="DRAG">

        <function name="aero/coefficient/CD0">
            <description>Drag_at_zero_lift</description>
            <product>
                <property>aero/qbar-psf</property>
                <property>metrics/Sw-sqft</property>
                <table>
                    <independentVar lookup="row">aero/alpha-rad</independentVar>
                    <tableData>
                        -1.57       1.500
                        -0.26    0.026
                        0.00    0.020
                        0.26    0.026
                        1.57       1.500
                    </tableData>
                </table>
            </product>
        </function>

        <function name="aero/coefficient/CDi">
            <description>Induced_drag</description>
            <product>
                <property>aero/qbar-psf</property>
                <property>metrics/Sw-sqft</property>
                <property>aero/cl-squared</property>
                <value>0.043</value>
            </product>
        </function>

        <function name="aero/coefficient/CDmach">
            <description>Drag_due_to_mach</description>
            <product>
                <property>aero/qbar-psf</property>
                <property>metrics/Sw-sqft</property>
                <table>
                    <independentVar lookup="row">velocities/mach</independentVar>
                    <tableData>
                        0.00      0.000
                        0.79      0.000
                        1.10      0.023
                        1.80      0.015
                    </tableData>
                </table>
            </product>
        </function>

        <function name="aero/coefficient/CDflap">
            <description>Drag_due_to_flaps</description>
            <product>
                <property>aero/qbar-psf</property>
                <property>metrics/Sw-sqft</property>
                <property>fcs/flap-pos-deg</property>
                <value> 0.00197 </value>
            </product>
        </function>

        <function name="aero/coefficient/CDgear">
            <description>Drag_due_to_gear</description>
            <product>
                <property>aero/qbar-psf</property>
                <property>metrics/Sw-sqft</property>
                <property>gear/gear-pos-norm</property>
                <value>0.015</value>
            </product>
        </function>

        <function name="aero/coefficient/CDsb">
            <description>Drag_due_to_speedbrakes</description>
            <product>
                <property>aero/qbar-psf</property>
                <property>metrics/Sw-sqft</property>
                <property>fcs/speedbrake-pos-norm</property>
                <value>0.02</value>
            </product>
        </function>

        <function name="aero/coefficient/CDbeta">
            <description>Drag_due_to_sideslip</description>
            <product>
                <property>aero/qbar-psf</property>
                <property>metrics/Sw-sqft</property>
                <table>
                    <independentVar lookup="row">aero/beta-rad</independentVar>
                    <tableData>
                        -1.57       1.230
                        -0.26    0.050
                        0.00       0.000
                        0.26    0.050
                        1.57       1.230
                    </tableData>
                </table>
            </product>
        </function>

        <function name="aero/coefficient/CDde">
            <description>Drag_due_to_Elevator_Deflection</description>
            <product>
                <property>aero/qbar-psf</property>
                <property>metrics/Sw-sqft</property>
                <property>fcs/elevator-pos-norm</property>
                <value>0.04</value>
            </product>
        </function>

    </axis>

    <axis name="SIDE">

        <function name="aero/coefficient/CYb">
            <description>Side_force_due_to_beta</description>
            <product>
                <property>aero/qbar-psf</property>
                <property>metrics/Sw-sqft</property>
                <property>aero/beta-rad</property>
                <value>-1</value>
            </product>
        </function>

    </axis>

    <axis name="ROLL">

        <function name="aero/coefficient/Clb">
            <description>Roll_moment_due_to_beta</description>
            <product>
                <property>aero/qbar-psf</property>
                <property>metrics/Sw-sqft</property>
                <property>metrics/bw-ft</property>
                <property>aero/beta-rad</property>
                <value>-0.1</value>
            </product>
        </function>

        <function name="aero/coefficient/Clp">
            <description>Roll_moment_due_to_roll_rate</description>
            <product>
                <property>aero/qbar-psf</property>
                <property>metrics/Sw-sqft</property>
                <property>metrics/bw-ft</property>
                <property>aero/bi2vel</property>
                <property>velocities/p-aero-rad_sec</property>
                <value>-0.4</value>
            </product>
        </function>

        <function name="aero/coefficient/Clr">
            <description>Roll_moment_due_to_yaw_rate</description>
            <product>
                <property>aero/qbar-psf</property>
                <property>metrics/Sw-sqft</property>
                <property>metrics/bw-ft</property>
                <property>aero/bi2vel</property>
                <property>velocities/r-aero-rad_sec</property>
                <value>0.15</value>
            </product>
        </function>

        <function name="aero/coefficient/Clda">
            <description>Roll_moment_due_to_aileron</description>
            <product>
                <property>aero/qbar-psf</property>
                <property>metrics/Sw-sqft</property>
                <property>metrics/bw-ft</property>
                <property>fcs/left-aileron-pos-rad</property>
                <table>
                    <independentVar lookup="row">velocities/mach</independentVar>
                    <tableData>
                        0.0    0.100
                        2.0    0.033
                    </tableData>
                </table>
            </product>
        </function>

        <function name="aero/coefficient/Cldr">
            <description>Roll_moment_due_to_rudder</description>
            <product>
                <property>aero/qbar-psf</property>
                <property>metrics/Sw-sqft</property>
                <property>metrics/bw-ft</property>
                <property>fcs/rudder-pos-rad</property>
                <value>0.01</value>
            </product>
        </function>

    </axis>

    <axis name="PITCH">

        <function name="aero/coefficient/Cmalpha">
            <description>Pitch_moment_due_to_alpha</description>
            <product>
                <property>aero/qbar-psf</property>
                <property>metrics/Sw-sqft</property>
                <property>metrics/cbarw-ft</property>
                <property>aero/alpha-rad</property>
                <value>-0.6</value>
            </product>
        </function>

        <function name="aero/coefficient/Cmde">
            <description>Pitch_moment_due_to_elevator</description>
            <product>
                <property>aero/qbar-psf</property>
                <property>metrics/Sw-sqft</property>
                <property>metrics/cbarw-ft</property>
                <property>fcs/elevator-pos-rad</property>
                <table>
                    <independentVar lookup="row">velocities/mach</independentVar>
                    <tableData>
                        0.0     -1.200
                        2.0     -0.300
                    </tableData>
                </table>
            </product>
        </function>

        <function name="aero/coefficient/Cmq">
            <description>Pitch_moment_due_to_pitch_rate</description>
            <product>
                <property>aero/qbar-psf</property>
                <property>metrics/Sw-sqft</property>
                <property>metrics/cbarw-ft</property>
                <property>aero/ci2vel</property>
                <property>velocities/q-aero-rad_sec</property>
                <value>-17</value>
            </product>
        </function>

        <function name="aero/coefficient/Cmadot">
            <description>Pitch_moment_due_to_alpha_rate</description>
            <product>
                <property>aero/qbar-psf</property>
                <property>metrics/Sw-sqft</property>
                <property>metrics/cbarw-ft</property>
                <property>aero/ci2vel</property>
                <property>aero/alphadot-rad_sec</property>
                <value>-6</value>
            </product>
        </function>

    </axis>

    <axis name="YAW">

        <function name="aero/coefficient/Cnb">
            <description>Yaw_moment_due_to_beta</description>
            <product>
                <property>aero/qbar-psf</property>
                <property>metrics/Sw-sqft</property>
                <property>metrics/bw-ft</property>
                <property>aero/beta-rad</property>
                <value>0.12</value>
            </product>
        </function>

        <function name="aero/coefficient/Cnr">
            <description>Yaw_moment_due_to_yaw_rate</description>
            <product>
                <property>aero/qbar-psf</property>
                <property>metrics/Sw-sqft</property>
                <property>metrics/bw-ft</property>
                <property>aero/bi2vel</property>
                <property>velocities/r-aero-rad_sec</property>
                <value>-0.15</value>
            </product>
        </function>

        <function name="aero/coefficient/Cndr">
            <description>Yaw_moment_due_to_rudder</description>
            <product>
                <property>aero/qbar-psf</property>
                <property>metrics/Sw-sqft</property>
                <property>metrics/bw-ft</property>
                <property>fcs/rudder-pos-rad</property>
                <value>-0.1</value>
            </product>
        </function>

        <function name="aero/coefficient/Cnda">
            <description>Adverse_yaw</description>
            <product>
                <property>aero/qbar-psf</property>
                <property>metrics/Sw-sqft</property>
                <property>metrics/bw-ft</property>
                <property>fcs/left-aileron-pos-rad</property>
                <value>0</value>
            </product>
        </function>

    </axis>

</aerodynamics>
<output name="JSBoutA300.csv" type="CSV" rate="5">
    <simulation> OFF </simulation>
    <atmosphere> OFF </atmosphere>
    <massprops> ON </massprops>
    <rates> OFF </rates>
    <velocities> OFF </velocities>
    <forces> ON </forces>
    <moments> ON </moments>
    <position> ON </position>
    <propulsion> ON </propulsion>
    <aerosurfaces> OFF </aerosurfaces>
    <fcs> ON </fcs>
    <ground_reactions> OFF </ground_reactions>
    <coefficients> OFF </coefficients>
</output>
</fdm_config>
